class weather
{
	double solar_global[W/sf];
	double solar_horizontal[W/sf];
	double solar_direct[W/sf];
	double clouds;
	double dewpoint[degF];
	double temperature[degF];
	double ground_reflectivity[pu];
	double wind_speed[m/s];
	double wind_dir[rad];
	double solar_altitude[deg];
	double humidity[%];
	double pressure[mbar];
	double heat_index[degF];
}
module tape;
#ifdef WEATHER
#set WEATHER=$WEATHER weather@9q9hbf
#else
#define WEATHER=weather@9q9hbf
#endif
object weather
{
	name "weather@9q9hbf";
	latitude 37.41;
	longitude -122.3;
	object player
	{
		file "weather_glm.csv";
		property "solar_global,solar_horizontal,solar_direct,clouds,dewpoint,temperature,ground_reflectivity,wind_speed,wind_dir,solar_altitude,humidity,pressure,heat_index";
	};
}
